// COMSOL Multiphysics 6.0.0.405 model "Phase-Field implementation in COMSOL ( KGD problem).mph"
// Static Fracture I PFM 1 11
// Outline of the model tree

Parameters
  E0 = 14.4[GPa]  // Young modulus
  Nu = 0.2  // Poisson
  Gc1 = 20[N/m]  // Critial Energy Release Rate
  k = 1e-9  // Control Numerical Sigularity
  l0 = hmax*2
  hmax = 0.05[m]  // maximum element size
  mu1 = E0/(2*(1+Nu))  // Lama Paramter1
  lambda1 = E0*Nu/((1+Nu)*(1-2*Nu))  // Lama Paramter2
  B = 1000/(1-k)
  kr = 1e-20[m^2]
  fai_cr1 = 0.4
  fai_cr2 = 0.99
  dfai_cr = fai_cr2-fai_cr1
  n_r0 = 0.19  // porosity of reservoir
  delta = 1e-9
  Ks = 36000[MPa]
  Kw = 3000[MPa]
  alphaB0 = 0.79

Functions
  an1: Analytic "COE_r" | funcname = COE_r; expr = if(x<fai_cr1, 1, if(x>fai_cr2, 0, (fai_cr2-x)/dfai_cr))
  an2: Analytic "COE_f" | funcname = COE_f; expr = if(x<fai_cr1,0,if(x>fai_cr2,1,(-fai_cr1+x)/dfai_cr))

Variables
  var1 "Variables 1"
    e1_p = if(solid.ep1>0,solid.ep1,0)
    e2_p = if(solid.ep2>0,solid.ep2,0)
    e3_p = if(solid.ep3>0,solid.ep3,0)
    tra1 = solid.ep1+solid.ep2+solid.ep3
    tra1_p = if(tra1>0,tra1,0)
    fai_p = lambda*tra1_p^2/2+mu*(e1_p^2+e2_p^2+e3_p^2)
    n1 = if(tra1>0,(1-k)*(1-u)^2+k,1)
    m1 = if(solid.ep1>0,(1-k)*(1-u)^2+k,1)
    n11 = solid.ep1X
    n12 = solid.ep1Y
    n13 = solid.ep1Z
    n21 = solid.ep2X
    n22 = solid.ep2Y
    n23 = solid.ep2Z
    n31 = solid.ep3X
    n32 = solid.ep3Y
    n33 = solid.ep3Z
    d11_p = if(solid.ep1>0,1,0)
    d22_p = if(solid.ep2>0,1,0)
    d33_p = if(solid.ep3>0,1,0)
    d11_n = if(solid.ep1<=0,1,0)
    d22_n = if(solid.ep2<=0,1,0)
    d33_n = if(solid.ep3<=0,1,0)
    l1 = if(solid.ep1>solid.ep2,solid.ep1,solid.ep1+delta)
    l2 = solid.ep2
    l3 = if(solid.ep3<solid.ep2,solid.ep3,solid.ep3-delta)
    g1_p = if(solid.ep1>solid.ep2,d11_p*solid.ep1,d11_p*solid.ep1+delta)
    g2_p = d22_p*solid.ep2
    g3_p = if(solid.ep3<solid.ep2,d33_p*solid.ep3,d33_p*solid.ep3-delta)
    g1_n = if(solid.ep1>solid.ep2,d11_n*solid.ep1,d11_n*solid.ep1+delta)
    g2_n = d22_n*solid.ep2
    g3_n = if(solid.ep3<solid.ep2,d33_n*solid.ep3,d33_n*solid.ep3-delta)
    g1111_p = d11_p*n11*n11*n11*n11+d22_p*n21*n21*n21*n21+d33_p*n31*n31*n31*n31+0.5*(g1_p-g2_p)/(l1-l2)*n11*n21*(n11*n21+n21*n11)+0.5*(g1_p-g3_p)/(l1-l3)*n11*n31*(n11*n31+n31*n11)+0.5*(g2_p-g1_p)/(l2-l1)*n21*n11*(n21*n11+n11*n21)+0.5*(g2_p-g3_p)/(l2-l3)*n21*n31*(n21*n31+n31*n21)+0.5*(g3_p-g1_p)/(l3-l1)*n31*n11*(n31*n11+n11*n31)+0.5*(g3_p-g2_p)/(l3-l2)*n31*n21*(n31*n21+n21*n31)
    g1122_p = d11_p*n11*n11*n12*n12+d22_p*n21*n21*n22*n22+d33_p*n31*n31*n32*n32+0.5*(g1_p-g2_p)/(l1-l2)*n11*n21*(n12*n22+n22*n12)+0.5*(g1_p-g3_p)/(l1-l3)*n11*n31*(n12*n32+n32*n12)+0.5*(g2_p-g1_p)/(l2-l1)*n21*n11*(n22*n12+n12*n22)+0.5*(g2_p-g3_p)/(l2-l3)*n21*n31*(n22*n32+n32*n22)+0.5*(g3_p-g1_p)/(l3-l1)*n31*n11*(n32*n12+n12*n32)+0.5*(g3_p-g2_p)/(l3-l2)*n31*n21*(n32*n22+n22*n32)
    g1133_p = d11_p*n11*n11*n13*n13+d22_p*n21*n21*n23*n23+d33_p*n31*n31*n33*n33+0.5*(g1_p-g2_p)/(l1-l2)*n11*n21*(n13*n23+n23*n13)+0.5*(g1_p-g3_p)/(l1-l3)*n11*n31*(n13*n33+n33*n13)+0.5*(g2_p-g1_p)/(l2-l1)*n21*n11*(n23*n13+n13*n23)+0.5*(g2_p-g3_p)/(l2-l3)*n21*n31*(n23*n33+n33*n23)+0.5*(g3_p-g1_p)/(l3-l1)*n31*n11*(n33*n13+n13*n33)+0.5*(g3_p-g2_p)/(l3-l2)*n31*n21*(n33*n23+n23*n33)
    g1112_p = d11_p*n11*n11*n11*n12+d22_p*n21*n21*n21*n22+d33_p*n31*n31*n31*n32+0.5*(g1_p-g2_p)/(l1-l2)*n11*n21*(n11*n22+n21*n12)+0.5*(g1_p-g3_p)/(l1-l3)*n11*n31*(n11*n32+n31*n12)+0.5*(g2_p-g1_p)/(l2-l1)*n21*n11*(n21*n12+n11*n22)+0.5*(g2_p-g3_p)/(l2-l3)*n21*n31*(n21*n32+n31*n22)+0.5*(g3_p-g1_p)/(l3-l1)*n31*n11*(n31*n12+n11*n32)+0.5*(g3_p-g2_p)/(l3-l2)*n31*n21*(n31*n22+n21*n32)
    g1123_p = d11_p*n11*n11*n12*n13+d22_p*n21*n21*n22*n23+d33_p*n31*n31*n32*n33+0.5*(g1_p-g2_p)/(l1-l2)*n11*n21*(n12*n23+n22*n13)+0.5*(g1_p-g3_p)/(l1-l3)*n11*n31*(n12*n33+n32*n13)+0.5*(g2_p-g1_p)/(l2-l1)*n21*n11*(n22*n13+n12*n23)+0.5*(g2_p-g3_p)/(l2-l3)*n21*n31*(n22*n33+n32*n23)+0.5*(g3_p-g1_p)/(l3-l1)*n31*n11*(n32*n13+n12*n33)+0.5*(g3_p-g2_p)/(l3-l2)*n31*n21*(n32*n23+n22*n33)
    g1113_p = d11_p*n11*n11*n11*n13+d22_p*n21*n21*n21*n23+d33_p*n31*n31*n31*n33+0.5*(g1_p-g2_p)/(l1-l2)*n11*n21*(n11*n23+n21*n13)+0.5*(g1_p-g3_p)/(l1-l3)*n11*n31*(n11*n33+n31*n13)+0.5*(g2_p-g1_p)/(l2-l1)*n21*n11*(n21*n13+n11*n23)+0.5*(g2_p-g3_p)/(l2-l3)*n21*n31*(n21*n33+n31*n23)+0.5*(g3_p-g1_p)/(l3-l1)*n31*n11*(n31*n13+n11*n33)+0.5*(g3_p-g2_p)/(l3-l2)*n31*n21*(n31*n23+n21*n33)
    g2222_p = d11_p*n12*n12*n12*n12+d22_p*n22*n22*n22*n22+d33_p*n32*n32*n32*n32+0.5*(g1_p-g2_p)/(l1-l2)*n12*n22*(n12*n22+n22*n12)+0.5*(g1_p-g3_p)/(l1-l3)*n12*n32*(n12*n32+n32*n12)+0.5*(g2_p-g1_p)/(l2-l1)*n22*n12*(n22*n12+n12*n22)+0.5*(g2_p-g3_p)/(l2-l3)*n22*n32*(n22*n32+n32*n22)+0.5*(g3_p-g1_p)/(l3-l1)*n32*n12*(n32*n12+n12*n32)+0.5*(g3_p-g2_p)/(l3-l2)*n32*n22*(n32*n22+n22*n32)
    g2233_p = d11_p*n12*n12*n13*n13+d22_p*n22*n22*n23*n23+d33_p*n32*n32*n33*n33+0.5*(g1_p-g2_p)/(l1-l2)*n12*n22*(n13*n23+n23*n13)+0.5*(g1_p-g3_p)/(l1-l3)*n12*n32*(n13*n33+n33*n13)+0.5*(g2_p-g1_p)/(l2-l1)*n22*n12*(n23*n13+n13*n23)+0.5*(g2_p-g3_p)/(l2-l3)*n22*n32*(n23*n33+n33*n23)+0.5*(g3_p-g1_p)/(l3-l1)*n32*n12*(n33*n13+n13*n33)+0.5*(g3_p-g2_p)/(l3-l2)*n32*n22*(n33*n23+n23*n33)
    g2212_p = d11_p*n12*n12*n11*n12+d22_p*n22*n22*n21*n22+d33_p*n32*n32*n31*n32+0.5*(g1_p-g2_p)/(l1-l2)*n12*n22*(n11*n22+n21*n12)+0.5*(g1_p-g3_p)/(l1-l3)*n12*n32*(n11*n32+n31*n12)+0.5*(g2_p-g1_p)/(l2-l1)*n22*n12*(n21*n12+n11*n22)+0.5*(g2_p-g3_p)/(l2-l3)*n22*n32*(n21*n32+n31*n22)+0.5*(g3_p-g1_p)/(l3-l1)*n32*n12*(n31*n12+n11*n32)+0.5*(g3_p-g2_p)/(l3-l2)*n32*n22*(n31*n22+n21*n32)
    g2223_p = d11_p*n12*n12*n12*n13+d22_p*n22*n22*n22*n23+d33_p*n32*n32*n32*n33+0.5*(g1_p-g2_p)/(l1-l2)*n12*n22*(n12*n23+n22*n13)+0.5*(g1_p-g3_p)/(l1-l3)*n12*n32*(n12*n33+n32*n13)+0.5*(g2_p-g1_p)/(l2-l1)*n22*n12*(n22*n13+n12*n23)+0.5*(g2_p-g3_p)/(l2-l3)*n22*n32*(n22*n33+n32*n23)+0.5*(g3_p-g1_p)/(l3-l1)*n32*n12*(n32*n13+n12*n33)+0.5*(g3_p-g2_p)/(l3-l2)*n32*n22*(n32*n23+n22*n33)
    g2213_p = d11_p*n12*n12*n11*n13+d22_p*n22*n22*n21*n23+d33_p*n32*n32*n31*n33+0.5*(g1_p-g2_p)/(l1-l2)*n12*n22*(n11*n23+n21*n13)+0.5*(g1_p-g3_p)/(l1-l3)*n12*n32*(n11*n33+n31*n13)+0.5*(g2_p-g1_p)/(l2-l1)*n22*n12*(n21*n13+n11*n23)+0.5*(g2_p-g3_p)/(l2-l3)*n22*n32*(n21*n33+n31*n23)+0.5*(g3_p-g1_p)/(l3-l1)*n32*n12*(n31*n13+n11*n33)+0.5*(g3_p-g2_p)/(l3-l2)*n32*n22*(n31*n23+n21*n33)
    g3333_p = d11_p*n13*n13*n13*n13+d22_p*n23*n23*n23*n23+d33_p*n33*n33*n33*n33+0.5*(g1_p-g2_p)/(l1-l2)*n13*n23*(n13*n23+n23*n13)+0.5*(g1_p-g3_p)/(l1-l3)*n13*n33*(n13*n33+n33*n13)+0.5*(g2_p-g1_p)/(l2-l1)*n23*n13*(n23*n13+n13*n23)+0.5*(g2_p-g3_p)/(l2-l3)*n23*n33*(n23*n33+n33*n23)+0.5*(g3_p-g1_p)/(l3-l1)*n33*n13*(n33*n13+n13*n33)+0.5*(g3_p-g2_p)/(l3-l2)*n33*n23*(n33*n23+n23*n33)
    g3312_p = d11_p*n13*n13*n11*n12+d22_p*n23*n23*n21*n22+d33_p*n33*n33*n31*n32+0.5*(g1_p-g2_p)/(l1-l2)*n13*n23*(n11*n22+n21*n12)+0.5*(g1_p-g3_p)/(l1-l3)*n13*n33*(n11*n32+n31*n12)+0.5*(g2_p-g1_p)/(l2-l1)*n23*n13*(n21*n12+n11*n22)+0.5*(g2_p-g3_p)/(l2-l3)*n23*n33*(n21*n32+n31*n22)+0.5*(g3_p-g1_p)/(l3-l1)*n33*n13*(n31*n12+n11*n32)+0.5*(g3_p-g2_p)/(l3-l2)*n33*n23*(n31*n22+n21*n32)
    g3323_p = d11_p*n13*n13*n12*n13+d22_p*n23*n23*n22*n23+d33_p*n33*n33*n32*n33+0.5*(g1_p-g2_p)/(l1-l2)*n13*n23*(n12*n23+n22*n13)+0.5*(g1_p-g3_p)/(l1-l3)*n13*n33*(n12*n33+n32*n13)+0.5*(g2_p-g1_p)/(l2-l1)*n23*n13*(n22*n13+n12*n23)+0.5*(g2_p-g3_p)/(l2-l3)*n23*n33*(n22*n33+n32*n23)+0.5*(g3_p-g1_p)/(l3-l1)*n33*n13*(n32*n13+n12*n33)+0.5*(g3_p-g2_p)/(l3-l2)*n33*n23*(n32*n23+n22*n33)
    g3313_p = d11_p*n13*n13*n11*n13+d22_p*n23*n23*n21*n23+d33_p*n33*n33*n31*n33+0.5*(g1_p-g2_p)/(l1-l2)*n13*n23*(n11*n23+n21*n13)+0.5*(g1_p-g3_p)/(l1-l3)*n13*n33*(n11*n33+n31*n13)+0.5*(g2_p-g1_p)/(l2-l1)*n23*n13*(n21*n13+n11*n23)+0.5*(g2_p-g3_p)/(l2-l3)*n23*n33*(n21*n33+n31*n23)+0.5*(g3_p-g1_p)/(l3-l1)*n33*n13*(n31*n13+n11*n33)+0.5*(g3_p-g2_p)/(l3-l2)*n33*n23*(n31*n23+n21*n33)
    g1212_p = d11_p*n11*n12*n11*n12+d22_p*n21*n22*n21*n22+d33_p*n31*n32*n31*n32+0.5*(g1_p-g2_p)/(l1-l2)*n11*n22*(n11*n22+n21*n12)+0.5*(g1_p-g3_p)/(l1-l3)*n11*n32*(n11*n32+n31*n12)+0.5*(g2_p-g1_p)/(l2-l1)*n21*n12*(n21*n12+n11*n22)+0.5*(g2_p-g3_p)/(l2-l3)*n21*n32*(n21*n32+n31*n22)+0.5*(g3_p-g1_p)/(l3-l1)*n31*n12*(n31*n12+n11*n32)+0.5*(g3_p-g2_p)/(l3-l2)*n31*n22*(n31*n22+n21*n32)
    g1223_p = d11_p*n11*n12*n12*n13+d22_p*n21*n22*n22*n23+d33_p*n31*n32*n32*n33+0.5*(g1_p-g2_p)/(l1-l2)*n11*n22*(n12*n23+n22*n13)+0.5*(g1_p-g3_p)/(l1-l3)*n11*n32*(n12*n33+n32*n13)+0.5*(g2_p-g1_p)/(l2-l1)*n21*n12*(n22*n13+n12*n23)+0.5*(g2_p-g3_p)/(l2-l3)*n21*n32*(n22*n33+n32*n23)+0.5*(g3_p-g1_p)/(l3-l1)*n31*n12*(n32*n13+n12*n33)+0.5*(g3_p-g2_p)/(l3-l2)*n31*n22*(n32*n23+n22*n33)
    g1213_p = d11_p*n11*n12*n11*n13+d22_p*n21*n22*n21*n23+d33_p*n31*n32*n31*n33+0.5*(g1_p-g2_p)/(l1-l2)*n11*n22*(n11*n23+n21*n13)+0.5*(g1_p-g3_p)/(l1-l3)*n11*n32*(n11*n33+n31*n13)+0.5*(g2_p-g1_p)/(l2-l1)*n21*n12*(n21*n13+n11*n23)+0.5*(g2_p-g3_p)/(l2-l3)*n21*n32*(n21*n33+n31*n23)+0.5*(g3_p-g1_p)/(l3-l1)*n31*n12*(n31*n13+n11*n33)+0.5*(g3_p-g2_p)/(l3-l2)*n31*n22*(n31*n23+n21*n33)
    g2323_p = d11_p*n12*n13*n12*n13+d22_p*n22*n23*n22*n23+d33_p*n32*n33*n32*n33+0.5*(g1_p-g2_p)/(l1-l2)*n12*n23*(n12*n23+n22*n13)+0.5*(g1_p-g3_p)/(l1-l3)*n12*n33*(n12*n33+n32*n13)+0.5*(g2_p-g1_p)/(l2-l1)*n22*n13*(n22*n13+n12*n23)+0.5*(g2_p-g3_p)/(l2-l3)*n22*n33*(n22*n33+n32*n23)+0.5*(g3_p-g1_p)/(l3-l1)*n32*n13*(n32*n13+n12*n33)+0.5*(g3_p-g2_p)/(l3-l2)*n32*n23*(n32*n23+n22*n33)
    g2313_p = d11_p*n12*n13*n11*n13+d22_p*n22*n23*n21*n23+d33_p*n32*n33*n31*n33+0.5*(g1_p-g2_p)/(l1-l2)*n12*n23*(n11*n23+n21*n13)+0.5*(g1_p-g3_p)/(l1-l3)*n12*n33*(n11*n33+n31*n13)+0.5*(g2_p-g1_p)/(l2-l1)*n22*n13*(n21*n13+n11*n23)+0.5*(g2_p-g3_p)/(l2-l3)*n22*n33*(n21*n33+n31*n23)+0.5*(g3_p-g1_p)/(l3-l1)*n32*n13*(n31*n13+n11*n33)+0.5*(g3_p-g2_p)/(l3-l2)*n32*n23*(n31*n23+n21*n33)
    g1313_p = d11_p*n11*n13*n11*n13+d22_p*n21*n23*n21*n23+d33_p*n31*n33*n31*n33+0.5*(g1_p-g2_p)/(l1-l2)*n11*n23*(n11*n23+n21*n13)+0.5*(g1_p-g3_p)/(l1-l3)*n11*n33*(n11*n33+n31*n13)+0.5*(g2_p-g1_p)/(l2-l1)*n21*n13*(n21*n13+n11*n23)+0.5*(g2_p-g3_p)/(l2-l3)*n21*n33*(n21*n33+n31*n23)+0.5*(g3_p-g1_p)/(l3-l1)*n31*n13*(n31*n13+n11*n33)+0.5*(g3_p-g2_p)/(l3-l2)*n31*n23*(n31*n23+n21*n33)
    g1111_n = d11_n*n11*n11*n11*n11+d22_n*n21*n21*n21*n21+d33_n*n31*n31*n31*n31+0.5*(g1_n-g2_n)/(l1-l2)*n11*n21*(n11*n21+n21*n11)+0.5*(g1_n-g3_n)/(l1-l3)*n11*n31*(n11*n31+n31*n11)+0.5*(g2_n-g1_n)/(l2-l1)*n21*n11*(n21*n11+n11*n21)+0.5*(g2_n-g3_n)/(l2-l3)*n21*n31*(n21*n31+n31*n21)+0.5*(g3_n-g1_n)/(l3-l1)*n31*n11*(n31*n11+n11*n31)+0.5*(g3_n-g2_n)/(l3-l2)*n31*n21*(n31*n21+n21*n31)
    g1122_n = d11_n*n11*n11*n12*n12+d22_n*n21*n21*n22*n22+d33_n*n31*n31*n32*n32+0.5*(g1_n-g2_n)/(l1-l2)*n11*n21*(n12*n22+n22*n12)+0.5*(g1_n-g3_n)/(l1-l3)*n11*n31*(n12*n32+n32*n12)+0.5*(g2_n-g1_n)/(l2-l1)*n21*n11*(n22*n12+n12*n22)+0.5*(g2_n-g3_n)/(l2-l3)*n21*n31*(n22*n32+n32*n22)+0.5*(g3_n-g1_n)/(l3-l1)*n31*n11*(n32*n12+n12*n32)+0.5*(g3_n-g2_n)/(l3-l2)*n31*n21*(n32*n22+n22*n32)
    g1133_n = d11_n*n11*n11*n13*n13+d22_n*n21*n21*n23*n23+d33_n*n31*n31*n33*n33+0.5*(g1_n-g2_n)/(l1-l2)*n11*n21*(n13*n23+n23*n13)+0.5*(g1_n-g3_n)/(l1-l3)*n11*n31*(n13*n33+n33*n13)+0.5*(g2_n-g1_n)/(l2-l1)*n21*n11*(n23*n13+n13*n23)+0.5*(g2_n-g3_n)/(l2-l3)*n21*n31*(n23*n33+n33*n23)+0.5*(g3_n-g1_n)/(l3-l1)*n31*n11*(n33*n13+n13*n33)+0.5*(g3_n-g2_n)/(l3-l2)*n31*n21*(n33*n23+n23*n33)
    g1112_n = d11_n*n11*n11*n11*n12+d22_n*n21*n21*n21*n22+d33_n*n31*n31*n31*n32+0.5*(g1_n-g2_n)/(l1-l2)*n11*n21*(n11*n22+n21*n12)+0.5*(g1_n-g3_n)/(l1-l3)*n11*n31*(n11*n32+n31*n12)+0.5*(g2_n-g1_n)/(l2-l1)*n21*n11*(n21*n12+n11*n22)+0.5*(g2_n-g3_n)/(l2-l3)*n21*n31*(n21*n32+n31*n22)+0.5*(g3_n-g1_n)/(l3-l1)*n31*n11*(n31*n12+n11*n32)+0.5*(g3_n-g2_n)/(l3-l2)*n31*n21*(n31*n22+n21*n32)
    g1123_n = d11_n*n11*n11*n12*n13+d22_n*n21*n21*n22*n23+d33_n*n31*n31*n32*n33+0.5*(g1_n-g2_n)/(l1-l2)*n11*n21*(n12*n23+n22*n13)+0.5*(g1_n-g3_n)/(l1-l3)*n11*n31*(n12*n33+n32*n13)+0.5*(g2_n-g1_n)/(l2-l1)*n21*n11*(n22*n13+n12*n23)+0.5*(g2_n-g3_n)/(l2-l3)*n21*n31*(n22*n33+n32*n23)+0.5*(g3_n-g1_n)/(l3-l1)*n31*n11*(n32*n13+n12*n33)+0.5*(g3_n-g2_n)/(l3-l2)*n31*n21*(n32*n23+n22*n33)
    g1113_n = d11_n*n11*n11*n11*n13+d22_n*n21*n21*n21*n23+d33_n*n31*n31*n31*n33+0.5*(g1_n-g2_n)/(l1-l2)*n11*n21*(n11*n23+n21*n13)+0.5*(g1_n-g3_n)/(l1-l3)*n11*n31*(n11*n33+n31*n13)+0.5*(g2_n-g1_n)/(l2-l1)*n21*n11*(n21*n13+n11*n23)+0.5*(g2_n-g3_n)/(l2-l3)*n21*n31*(n21*n33+n31*n23)+0.5*(g3_n-g1_n)/(l3-l1)*n31*n11*(n31*n13+n11*n33)+0.5*(g3_n-g2_n)/(l3-l2)*n31*n21*(n31*n23+n21*n33)
    g2222_n = d11_n*n12*n12*n12*n12+d22_n*n22*n22*n22*n22+d33_n*n32*n32*n32*n32+0.5*(g1_n-g2_n)/(l1-l2)*n12*n22*(n12*n22+n22*n12)+0.5*(g1_n-g3_n)/(l1-l3)*n12*n32*(n12*n32+n32*n12)+0.5*(g2_n-g1_n)/(l2-l1)*n22*n12*(n22*n12+n12*n22)+0.5*(g2_n-g3_n)/(l2-l3)*n22*n32*(n22*n32+n32*n22)+0.5*(g3_n-g1_n)/(l3-l1)*n32*n12*(n32*n12+n12*n32)+0.5*(g3_n-g2_n)/(l3-l2)*n32*n22*(n32*n22+n22*n32)
    g2233_n = d11_n*n12*n12*n13*n13+d22_n*n22*n22*n23*n23+d33_n*n32*n32*n33*n33+0.5*(g1_n-g2_n)/(l1-l2)*n12*n22*(n13*n23+n23*n13)+0.5*(g1_n-g3_n)/(l1-l3)*n12*n32*(n13*n33+n33*n13)+0.5*(g2_n-g1_n)/(l2-l1)*n22*n12*(n23*n13+n13*n23)+0.5*(g2_n-g3_n)/(l2-l3)*n22*n32*(n23*n33+n33*n23)+0.5*(g3_n-g1_n)/(l3-l1)*n32*n12*(n33*n13+n13*n33)+0.5*(g3_n-g2_n)/(l3-l2)*n32*n22*(n33*n23+n23*n33)
    g2212_n = d11_n*n12*n12*n11*n12+d22_n*n22*n22*n21*n22+d33_n*n32*n32*n31*n32+0.5*(g1_n-g2_n)/(l1-l2)*n12*n22*(n11*n22+n21*n12)+0.5*(g1_n-g3_n)/(l1-l3)*n12*n32*(n11*n32+n31*n12)+0.5*(g2_n-g1_n)/(l2-l1)*n22*n12*(n21*n12+n11*n22)+0.5*(g2_n-g3_n)/(l2-l3)*n22*n32*(n21*n32+n31*n22)+0.5*(g3_n-g1_n)/(l3-l1)*n32*n12*(n31*n12+n11*n32)+0.5*(g3_n-g2_n)/(l3-l2)*n32*n22*(n31*n22+n21*n32)
    g2223_n = d11_n*n12*n12*n12*n13+d22_n*n22*n22*n22*n23+d33_n*n32*n32*n32*n33+0.5*(g1_n-g2_n)/(l1-l2)*n12*n22*(n12*n23+n22*n13)+0.5*(g1_n-g3_n)/(l1-l3)*n12*n32*(n12*n33+n32*n13)+0.5*(g2_n-g1_n)/(l2-l1)*n22*n12*(n22*n13+n12*n23)+0.5*(g2_n-g3_n)/(l2-l3)*n22*n32*(n22*n33+n32*n23)+0.5*(g3_n-g1_n)/(l3-l1)*n32*n12*(n32*n13+n12*n33)+0.5*(g3_n-g2_n)/(l3-l2)*n32*n22*(n32*n23+n22*n33)
    g2213_n = d11_n*n12*n12*n11*n13+d22_n*n22*n22*n21*n23+d33_n*n32*n32*n31*n33+0.5*(g1_n-g2_n)/(l1-l2)*n12*n22*(n11*n23+n21*n13)+0.5*(g1_n-g3_n)/(l1-l3)*n12*n32*(n11*n33+n31*n13)+0.5*(g2_n-g1_n)/(l2-l1)*n22*n12*(n21*n13+n11*n23)+0.5*(g2_n-g3_n)/(l2-l3)*n22*n32*(n21*n33+n31*n23)+0.5*(g3_n-g1_n)/(l3-l1)*n32*n12*(n31*n13+n11*n33)+0.5*(g3_n-g2_n)/(l3-l2)*n32*n22*(n31*n23+n21*n33)
    g3333_n = d11_n*n13*n13*n13*n13+d22_n*n23*n23*n23*n23+d33_n*n33*n33*n33*n33+0.5*(g1_n-g2_n)/(l1-l2)*n13*n23*(n13*n23+n23*n13)+0.5*(g1_n-g3_n)/(l1-l3)*n13*n33*(n13*n33+n33*n13)+0.5*(g2_n-g1_n)/(l2-l1)*n23*n13*(n23*n13+n13*n23)+0.5*(g2_n-g3_n)/(l2-l3)*n23*n33*(n23*n33+n33*n23)+0.5*(g3_n-g1_n)/(l3-l1)*n33*n13*(n33*n13+n13*n33)+0.5*(g3_n-g2_n)/(l3-l2)*n33*n23*(n33*n23+n23*n33)
    g3312_n = d11_n*n13*n13*n11*n12+d22_n*n23*n23*n21*n22+d33_n*n33*n33*n31*n32+0.5*(g1_n-g2_n)/(l1-l2)*n13*n23*(n11*n22+n21*n12)+0.5*(g1_n-g3_n)/(l1-l3)*n13*n33*(n11*n32+n31*n12)+0.5*(g2_n-g1_n)/(l2-l1)*n23*n13*(n21*n12+n11*n22)+0.5*(g2_n-g3_n)/(l2-l3)*n23*n33*(n21*n32+n31*n22)+0.5*(g3_n-g1_n)/(l3-l1)*n33*n13*(n31*n12+n11*n32)+0.5*(g3_n-g2_n)/(l3-l2)*n33*n23*(n31*n22+n21*n32)
    g3323_n = d11_n*n13*n13*n12*n13+d22_n*n23*n23*n22*n23+d33_n*n33*n33*n32*n33+0.5*(g1_n-g2_n)/(l1-l2)*n13*n23*(n12*n23+n22*n13)+0.5*(g1_n-g3_n)/(l1-l3)*n13*n33*(n12*n33+n32*n13)+0.5*(g2_n-g1_n)/(l2-l1)*n23*n13*(n22*n13+n12*n23)+0.5*(g2_n-g3_n)/(l2-l3)*n23*n33*(n22*n33+n32*n23)+0.5*(g3_n-g1_n)/(l3-l1)*n33*n13*(n32*n13+n12*n33)+0.5*(g3_n-g2_n)/(l3-l2)*n33*n23*(n32*n23+n22*n33)
    g3313_n = d11_n*n13*n13*n11*n13+d22_n*n23*n23*n21*n23+d33_n*n33*n33*n31*n33+0.5*(g1_n-g2_n)/(l1-l2)*n13*n23*(n11*n23+n21*n13)+0.5*(g1_n-g3_n)/(l1-l3)*n13*n33*(n11*n33+n31*n13)+0.5*(g2_n-g1_n)/(l2-l1)*n23*n13*(n21*n13+n11*n23)+0.5*(g2_n-g3_n)/(l2-l3)*n23*n33*(n21*n33+n31*n23)+0.5*(g3_n-g1_n)/(l3-l1)*n33*n13*(n31*n13+n11*n33)+0.5*(g3_n-g2_n)/(l3-l2)*n33*n23*(n31*n23+n21*n33)
    g1212_n = d11_n*n11*n12*n11*n12+d22_n*n21*n22*n21*n22+d33_n*n31*n32*n31*n32+0.5*(g1_n-g2_n)/(l1-l2)*n11*n22*(n11*n22+n21*n12)+0.5*(g1_n-g3_n)/(l1-l3)*n11*n32*(n11*n32+n31*n12)+0.5*(g2_n-g1_n)/(l2-l1)*n21*n12*(n21*n12+n11*n22)+0.5*(g2_n-g3_n)/(l2-l3)*n21*n32*(n21*n32+n31*n22)+0.5*(g3_n-g1_n)/(l3-l1)*n31*n12*(n31*n12+n11*n32)+0.5*(g3_n-g2_n)/(l3-l2)*n31*n22*(n31*n22+n21*n32)
    g1223_n = d11_n*n11*n12*n12*n13+d22_n*n21*n22*n22*n23+d33_n*n31*n32*n32*n33+0.5*(g1_n-g2_n)/(l1-l2)*n11*n22*(n12*n23+n22*n13)+0.5*(g1_n-g3_n)/(l1-l3)*n11*n32*(n12*n33+n32*n13)+0.5*(g2_n-g1_n)/(l2-l1)*n21*n12*(n22*n13+n12*n23)+0.5*(g2_n-g3_n)/(l2-l3)*n21*n32*(n22*n33+n32*n23)+0.5*(g3_n-g1_n)/(l3-l1)*n31*n12*(n32*n13+n12*n33)+0.5*(g3_n-g2_n)/(l3-l2)*n31*n22*(n32*n23+n22*n33)
    g1213_n = d11_n*n11*n12*n11*n13+d22_n*n21*n22*n21*n23+d33_n*n31*n32*n31*n33+0.5*(g1_n-g2_n)/(l1-l2)*n11*n22*(n11*n23+n21*n13)+0.5*(g1_n-g3_n)/(l1-l3)*n11*n32*(n11*n33+n31*n13)+0.5*(g2_n-g1_n)/(l2-l1)*n21*n12*(n21*n13+n11*n23)+0.5*(g2_n-g3_n)/(l2-l3)*n21*n32*(n21*n33+n31*n23)+0.5*(g3_n-g1_n)/(l3-l1)*n31*n12*(n31*n13+n11*n33)+0.5*(g3_n-g2_n)/(l3-l2)*n31*n22*(n31*n23+n21*n33)
    g2323_n = d11_n*n12*n13*n12*n13+d22_n*n22*n23*n22*n23+d33_n*n32*n33*n32*n33+0.5*(g1_n-g2_n)/(l1-l2)*n12*n23*(n12*n23+n22*n13)+0.5*(g1_n-g3_n)/(l1-l3)*n12*n33*(n12*n33+n32*n13)+0.5*(g2_n-g1_n)/(l2-l1)*n22*n13*(n22*n13+n12*n23)+0.5*(g2_n-g3_n)/(l2-l3)*n22*n33*(n22*n33+n32*n23)+0.5*(g3_n-g1_n)/(l3-l1)*n32*n13*(n32*n13+n12*n33)+0.5*(g3_n-g2_n)/(l3-l2)*n32*n23*(n32*n23+n22*n33)
    g2313_n = d11_n*n12*n13*n11*n13+d22_n*n22*n23*n21*n23+d33_n*n32*n33*n31*n33+0.5*(g1_n-g2_n)/(l1-l2)*n12*n23*(n11*n23+n21*n13)+0.5*(g1_n-g3_n)/(l1-l3)*n12*n33*(n11*n33+n31*n13)+0.5*(g2_n-g1_n)/(l2-l1)*n22*n13*(n21*n13+n11*n23)+0.5*(g2_n-g3_n)/(l2-l3)*n22*n33*(n21*n33+n31*n23)+0.5*(g3_n-g1_n)/(l3-l1)*n32*n13*(n31*n13+n11*n33)+0.5*(g3_n-g2_n)/(l3-l2)*n32*n23*(n31*n23+n21*n33)
    g1313_n = d11_n*n11*n13*n11*n13+d22_n*n21*n23*n21*n23+d33_n*n31*n33*n31*n33+0.5*(g1_n-g2_n)/(l1-l2)*n11*n23*(n11*n23+n21*n13)+0.5*(g1_n-g3_n)/(l1-l3)*n11*n33*(n11*n33+n31*n13)+0.5*(g2_n-g1_n)/(l2-l1)*n21*n13*(n21*n13+n11*n23)+0.5*(g2_n-g3_n)/(l2-l3)*n21*n33*(n21*n33+n31*n23)+0.5*(g3_n-g1_n)/(l3-l1)*n31*n13*(n31*n13+n11*n33)+0.5*(g3_n-g2_n)/(l3-l2)*n31*n23*(n31*n23+n21*n33)
    cc = (1-k)*(1-u)^2+k
    dd = if(tra1>0,(1-k)*(1-u)^2+k,1)
    g1111 = 2*mu*(cc*g1111_p+g1111_n)+lambda*dd
    g1122 = 2*mu*(cc*g1122_p+g1122_n)+lambda*dd
    g1133 = 2*mu*(cc*g1133_p+g1133_n)+lambda*dd
    g1112 = 2*mu*(cc*g1112_p+g1112_n)
    g1123 = 2*mu*(cc*g1123_p+g1123_n)
    g1113 = 2*mu*(cc*g1113_p+g1113_n)
    g2222 = 2*mu*(cc*g2222_p+g2222_n)+lambda*dd
    g2233 = 2*mu*(cc*g2233_p+g2233_n)+lambda*dd
    g2212 = 2*mu*(cc*g2212_p+g2212_n)
    g2223 = 2*mu*(cc*g2223_p+g2223_n)
    g2213 = 2*mu*(cc*g2213_p+g2213_n)
    g3333 = 2*mu*(cc*g3333_p+g3333_n)+lambda*dd
    g3312 = 2*mu*(cc*g3312_p+g3312_n)
    g3323 = 2*mu*(cc*g3323_p+g3323_n)
    g3313 = 2*mu*(cc*g3313_p+g3313_n)
    g1212 = 2*mu*(cc*g1212_p+g1212_n)
    g1223 = 2*mu*(cc*g1223_p+g1223_n)
    g1213 = 2*mu*(cc*g1213_p+g1213_n)
    g2323 = 2*mu*(cc*g2323_p+g2323_n)
    g2313 = 2*mu*(cc*g2313_p+g2313_n)
    g1313 = 2*mu*(cc*g1313_p+g1313_n)
    coe_f = (u-fai_cr1)/dfai_cr
    coe_r = (fai_cr2-u)/dfai_cr
    mu = mu1
    lambda = lambda1
    Gc = Gc1
    ex = solid.eel11
    ey = solid.eel22
    ez = solid.eel33
    K = Ks*(1-alphaB0)
    evol = tra1  // volumetric strain
    crackV = (tra1_p)*hmax  // crack width
    alphaB = 1-(1-alphaB0)*(1-u)^2
    e_voidratio0 = n_r0/(1-n_r0)  // updated void ratio
    e_voidratio = (1+e_voidratio0)*solid.evol+e_voidratio0
    n_r = e_voidratio/(1+e_voidratio)  // updated porosity
    n_0 = n_r*COE_r(u)+1*COE_f(u)  // porosity

Selections
  sel1: Explicit "outer circle" on boundaries 2, 7, 9-17
  sel2: Explicit on boundaries 2, 7, 9-17

Probes
  dom1: Domain "Domain Probe 1" on domains 1, 2 | type = maximum; expr = crackV; unit = m; table = tbl1

Geometry
  geom1 "Geometry 1" (2D, length unit m)

Physics
  solid: SolidMechanics on all domains
    dependent variable u2 = {u2, v2, w2}
    ShapeProperty.order_displacement = 1
    EquationForm.form = Automatic
    Type2D.Type2D = PlaneStrain
    d.d = 1
    StructuralTransientBehavior.StructuralTransientBehavior = Quasistatic
    lemm1: LinearElasticModel "Linear Elastic Material 1" (default)
      SolidModel = Anisotropic
      ForceLinearStrainRes = 1
      IsotropicOption = Lame
      AnisotropicOption = AnisotropicStd
      E_mat = userdef
      E = E0*((1-k)*(1-u)^2+k)
      nu_mat = userdef
      nu = Nu
      lambLame_mat = userdef
      lambLame = lanta*n1
      muLame_mat = userdef
      muLame = mu*m1
      D_mat = userdef
      D = {g1111, g1122, g1133, g1112, g1123, g1113, g1122, g2222, g2233, g2212, g2223, g2213, g1133, g2233, g3333, g3312, g3323, g3313, g1112, g2212, g3312, g1212, g1223, g1213, g1123, g2223, g3323, g1223, g2323, g2313, g1113, g2213, g3313, g1213, g2313, g1313}
      rho_mat = userdef
      rho = 2000
      exs1: ExternalStress on all domains
        pref = 0
        StressInputType = PorePressure
        pA = pf
        alphaB_mat = userdef
        alphaB = alphaB
    free1: Free (default)
    init1: init "Initial Values 1" (default)
    disp2: Displacement1 "Prescribed Displacement 1" on boundaries 2, 7, 9-17 | Direction = {1, 1, 0}
    sym1: SymmetrySolid "Symmetry 1" on boundaries 1, 3, 5
  hzeq: HelmholtzEquation on all domains
    dependent variable u
    ShapeProperty.order = 1
    Units.CustomSourceTermUnit = 1
    heq1: HelmholtzEquation (default) | c = {l0^2, 0, 0, l0^2}; a = 2*l0*H*(1-k)/Gc+1; f = 2*H*l0*(1-k)/Gc
    zflx1: ZeroFluxBoundary "Zero Flux 1" (default)
    init1: init "Initial Values 1" (default) | u = 0
    init2: init "Initial Values 2" on domains 2 | u = 0.99
  dode: DomainODE "Domain ODEs and DAEs" on all domains
    dependent variable H
    ShapeProperty.order = 1
    Units.DependentVariableQuantity = none
    Units.CustomDependentVariableUnit = J/m^3
    Units.SourceTermQuantity = none
    Units.CustomSourceTermUnit = J/m^3
    dode1: DistributedODE (default) | f = H-nojac(if(fai_p>H,fai_p,H)); da = 0
    init1: init "Initial Values 1" (default) | H = 0; HTIME = 0
    init2: init "Initial Values 2" on domains 2 | H = 0.5*B*Gc/l0*(1-abs(Y)*2/l0)
  dl: DarcysLaw on all domains
    dependent variable pf
    ShapeProperty.order_pressure = 1
    ShapeProperty.boundaryFlux_pressure = 1
    EquationForm.form = Automatic
    PhysicalModelProperty.pref = 0
    PhysicalModelProperty.dz = 1
    GravityEffects.IncludeGravity = 0
    porous1: PorousMedium (default) | storageModelType = userdef; Sp = dl.epsilon/Kw+(alphaB-dl.epsilon)/Ks
      fluid1: FluidPorousMedium "Fluid 1" (default)
        rho_mat = userdef
        rho = 1000[kg/m^3]
        mu_mat = userdef
        mu = 1e-3[Pa*s]
      pm1: PorousMatrixPorousMedium "Porous Matrix 1" (default)
        epsilon_mat = userdef
        epsilon = n_0
        kappa_mat = userdef
        kappa = 1/12*(crackV)^3/hmax+kr
    nf1: NoFlow (default)
    init1: init "Initial Values 1" (default)
    ms2: MassSource on domains 1, 2 | Qm = -dl.rho*alphaB*d(evol,TIME)
    ph1: PressureHead on selection sel1
    inl1: Inlet on boundaries 3 | BoundaryCondition = Velocity; U0 = 0.0001[m^2/s]/hmax
    porous2: PorousMedium "Porous Medium notch" on domains 2 | storageModelType = userdef; Sp = 1/Kw
      fluid1: FluidPorousMedium "Fluid 1" (default)
        rho_mat = userdef
        rho = 1000[kg/m^3]
        mu_mat = userdef
        mu = 1e-3[Pa*s]
      pm1: PorousMatrixPorousMedium "Porous Matrix 1" (default)
        epsilon_mat = userdef
        epsilon = n_0
        kappa_mat = userdef
        kappa = 1/12*((if(dom1>4e-4[m],crackV,4e-4[m]))^3)/hmax+kr

Mesh
  mesh2 "Mesh 2"
    imp1: Import | source = nastran; filename = .\Mesh KGD.dat; sequence = none; linearelem = on
    fin: Finalize

Studies
  std1 "Study 1"
    time: Transient "Time Dependent" | tlist = range(0,0.05,10); rtol = 1e-3

Solver configurations
  sol1 "Solver 1" (study std1)
    v1: Variables "Dependent Variables 1"
      comp1_u2: Field "Displacement field (comp1.u2)" | scalemethod = none; scaleval = 1e-2*0.00141421356237
    t1: Time "Time-Dependent Solver 1"
      tlist = range(0,0.05,10)
      tout = tstepsclosest
      atolglobal = 0.0010
      timemethod = genalpha
      initialstepbdf = 1
      maxstepbdf = 1
      eventtol = 1e-2
      initialstepgenalpha = 0.005
      maxstepconstraintgenalpha = const
      maxstepgenalpha = 0.0025
      rhoinf = 0
      fieldselection = comp1_u
      dDef: Direct
      se1: Segregated | maxsegiter = 50; segtermonres = auto; segaaccdim = 100
        ssDef: SegregatedStep "U"
          segvar = {comp1_u2, comp1_pf}
          subjtech = onevery
          subtermconst = tol
          subtermonres = auto
          maxsubiter = 50
          subntolfact = 1
        ss1: SegregatedStep "H"
          segvar = {comp1_H}
          subjtech = onevery
          subtermconst = tol
          subtermonres = auto
          maxsubiter = 50
          subntolfact = 1
        ss2: SegregatedStep "Fai"
          segvar = {comp1_u}
          subjtech = onevery
          subtermconst = tol
          subtermonres = auto
          maxsubiter = 50
          subntolfact = 1
        ll1: LowerLimit | lowerlimit = comp1.H 0
      ps1: PreviousSolution | prevcomp = {comp1_H}

Datasets
  dset1: Solution | solution = sol1
  cpt1: CutPoint2D | data = dset1; pointx = 0; pointy = 0
  cln1: CutLine2D | data = dset1; genpoints = {{0, 0.025}, {20, 0.025}}
  cln2: CutLine2D | data = dset1; genpoints = {{0, -0.025}, {20, -0.025}}
  cln3: CutLine2D | data = dset1; genpoints = {{0, 0}, {20, 0}}
  dset3: Solution "Probe Solution 3" | solution = sol1
  max1: Maximum "Domain Probe 1" on domains 1, 2 | data = dset3

Tables
  mrkvl1: Table "Maximum and Minimum Values"
    // Marker
    X | Y | updated crack width (m)
    -0.5 | -0.01 | 0.00089328
  tbl1: Table "Probe Table 1"
    Time (s) | Dependent variable u, Domain Probe 1
    0 | 0
    0.005 | 3.69536e-09
    0.015 | 1.34953e-06
    0.025 | 3.04106e-06
    0.035 | 6.09924e-06
    0.045 | 9.97068e-06
    0.055 | 1.44676e-05
    0.065 | 1.94615e-05
    0.075 | 2.48475e-05
    0.085 | 3.05398e-05
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  tbl2: Table
    Time (s) | Pressure
    0 | 2074.39
    0.055 | 2.05562e+06
    0.105 | 1.82044e+06
    0.155 | 1.61649e+06
    0.205 | 1.48633e+06
    0.255 | 1.39452e+06
    0.305 | 1.32727e+06
    0.355 | 1.27632e+06
    0.405 | 1.23689e+06
    0.453 | 1.2086e+06
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
Plots
  pg6: PlotGroup2D "Mesh" | data = dset1
    mesh1: Mesh
  pg7: PlotGroup2D "Fai" | data = dset1; title = Phase Field; axisnotation = engineering
    surf1: Surface | expr = u
      filt1: Filter (disabled) | expr = u<=0.95
  pg11: PlotGroup2D "stress" | data = dset1
    surf1: Surface | expr = solid.sl22
      filt1: Filter (disabled) | expr = u<0.95
    surf2: Surface (disabled) | expr = solid.sl22
      filt1: Filter (disabled) | expr = u<0.95
  pg15: PlotGroup2D "Pressure" | data = dset1
    surf1: Surface | expr = -pf
  pg16: PlotGroup2D "Displacement x" | data = dset1
    surf1: Surface | expr = u2
  pg18: PlotGroup2D "Displacement y" | data = dset1
    surf1: Surface | expr = v2; descr = Displacement field, Y component
      def1: Deform "Deformation 1" (disabled) | expr = {u2, v2}
      filt1: Filter (disabled) | expr = u<=0.96
  pg19: PlotGroup2D "Total Displacement" | data = dset1
    surf1: Surface | expr = solid.disp
      def: Deform "Deformation" (disabled) | expr = {u2, v2}; descr = Displacement field (Material)
      filt1: Filter | expr = u<0.96
  pg20: PlotGroup2D "crack width" | data = dset1; title = Crack width (m)
    surf1: Surface | data = dset1; expr = crackV
      def1: Deform "Deformation 1" (disabled) | expr = {u2, v2}
      mrkr1: Marker (disabled) | display = max; table = mrkvl1
      hght1: Height "Height Expression 1" (disabled) | heightdata = expr; expr = crackW
  pg22: PlotGroup1D "Pressure-Time"
    data = dset1
    title = Crack Mouth Pressure (Pa)
    xlabel = Time (s)
    ylabel = Crack Mouth Pressure (Pa)
    ptgr1: PointGraph "pressure" | data = cpt1; expr = pf

Exports
  anim1: Animation | target = player
  anim2: Animation | target = player; maxframes = 100; frametime = 0.3
  anim3: Animation
    giffilename = C:\Users\z5318065\OneDrive - UNSW\PhD\comsol\9-KGD final\fai.gif
    framesel = all
    size = current
  anim4: Animation | target = player
  anim5: Animation | giffilename = crack width; size = current; height = 300
  anim6: Animation | giffilename = C:\Users\z5318065\OneDrive - UNSW\PhD\comsol\9-KGD final\fai.gif